# Stage F F1_curved_cap_100A production template.
# Run only after F0 interpretation exists and matching F1 smoke passes validation.

units           metal
atom_style      atomic
boundary        p p f

variable        DATA_FILE string data.stageF_F1_curved_cap_100A_smoke.final
read_data       ${DATA_FILE}

pair_style      meam
pair_coeff      * * ../../../potentials/meam/Jelinek_2012/Jelinek_2012_meamf AlS SiS MgS CuS FeS ../../../potentials/meam/Jelinek_2012/Jelinek_2012_meam.alsimgcufe AlS FeS

neighbor        2.0 bin
neigh_modify    every 1 delay 0 check no
timestep        0.001

compute         pe_atom all pe/atom
compute         st all stress/atom NULL virial

region          bottom block INF INF INF INF INF 8.0 units box
group           bottom region bottom
group           mobile subtract all bottom
fix             hold bottom setforce 0.0 0.0 0.0
velocity        mobile create 300.0 88004 mom yes rot yes dist gaussian
fix             nvt_mobile mobile nvt temp 300.0 300.0 0.1

thermo          1000
thermo_style    custom step atoms temp pe ke etotal press pxx pyy pzz lx ly lz
dump            d1 all custom 1000 dump.stageF_F1_curved_cap_100A_production.lammpstrj id type x y z c_pe_atom c_st[1] c_st[2] c_st[3] c_st[4] c_st[5] c_st[6]
dump_modify     d1 sort id
restart         5000 restart.stageF_F1_curved_cap_100A_production.*

run             50000

write_restart   restart.stageF_F1_curved_cap_100A_production.final
write_data      data.stageF_F1_curved_cap_100A_production.final
write_dump      all custom dump.stageF_F1_curved_cap_100A_production_final.lammpstrj id type x y z c_pe_atom c_st[1] c_st[2] c_st[3] c_st[4] c_st[5] c_st[6] modify sort id
