# Shear loading of an Al/Al13Fe4 cell containing an edge-dislocation pair.
# The bottom layer is fixed and a force along x is applied to the top layer.
# All other atoms, including the driven layer, are thermostatted at 300 K.
# After 5 ps at zero traction, the loading rate rises smoothly over 16 ps
# and stays constant until the prescribed end stress. Each time step is 1 fs.
#
# Metal units: angstrom, eV, ps, K and bar; TAUMAX_MPA is supplied in MPa.
# Variables supplied with -var:
#   DATA_FILE, POT_DIR, OUT_PREFIX  input data, MEAM directory, output prefix
#   NSTEPS, TAUMAX_MPA              total dynamics steps and final nominal traction
#   TOPZ                           lower z bound of the driven layer, in A
#   XL0 XL1 ZL0 ZL1                fixed lower monitoring window, in A
#   XU0 XU1 ZU0 ZU1                fixed upper monitoring window, in A
#   N_AL                           matrix atom count; higher IDs are inclusion
#   HOLD_INCL, KSPRING             enable input-coordinate springs; stiffness eV/A^2
#   CG_MAX                         initial minimisation iteration limit
#   RESEED                         positive values replace velocity seed 88004
# Atom types: 1 Al, 2 Fe, 3 Mg, 4 Si. The cell is periodic in x and y.

units           metal
atom_style      atomic
boundary        p p f

variable        NSTEPS index 101000
variable        TAUMAX_MPA index 400
variable        RESEED index 0
variable        HOLD_INCL index 0
variable        KSPRING index 20.0
variable        CG_MAX index 2000
variable        PRE_STEPS equal 5000
variable        TS equal 16000

read_data       ${DATA_FILE}

pair_style      meam
pair_coeff      * * ${POT_DIR}/Jelinek_2012_meamf AlS SiS MgS CuS FeS ${POT_DIR}/Jelinek_2012_meam.alsimgcufe AlS FeS MgS SiS

neighbor        2.0 bin
neigh_modify    delay 0 every 10 check no
timestep        0.001

compute         pe_atom all pe/atom
compute         st all stress/atom NULL virial

region          bottom block INF INF INF INF INF 6.0 units box
group           bottom region bottom
group           mobile subtract all bottom
fix             hold bottom setforce 0.0 0.0 0.0

variable        first_incl equal v_N_AL+1
group           inclusion id ${first_incl}:999999999
if "${HOLD_INCL} > 0" then &
   "fix tether inclusion spring/self ${KSPRING}" &
   "fix_modify tether energy yes"

# Initial minimisation includes the springs when HOLD_INCL is enabled.
thermo          200
thermo_style    custom step atoms temp pe press pxz
thermo_modify   flush yes
# Rebuild neighbours every minimisation step for the recorded Kokkos protocol.
neigh_modify    delay 0 every 1 check no
min_style       cg
min_modify      dmax 0.1
minimize        0.0 1.0 ${CG_MAX} 20000
reset_timestep  0
neigh_modify    delay 0 every 10 check no

fix             nvt_mobile mobile nvt temp 300.0 300.0 0.1
fix             ztop mobile wall/reflect zhi EDGE units box
velocity        mobile create 300.0 88004 mom yes rot yes dist gaussian
if "${RESEED} > 0" then "velocity mobile create 300.0 ${RESEED} mom yes rot yes dist gaussian"

# Integrate the raised-cosine loading rate; taubar is nominal traction in bar.
variable        NRAMP equal v_NSTEPS-v_PRE_STEPS
variable        RBAR equal 10.0*v_TAUMAX_MPA/(v_NRAMP-0.5*v_TS)
variable        sp equal step-v_PRE_STEPS
variable        taubar equal "(step >= v_PRE_STEPS) * ((v_sp < v_TS) * v_RBAR*(0.5*v_sp - (v_TS/(2*PI))*sin(PI*v_sp/v_TS)) + (v_sp >= v_TS) * v_RBAR*(v_sp - 0.5*v_TS))"

region          topgrab block INF INF INF INF ${TOPZ} INF units box
group           topgrab region topgrab
variable        ntop equal count(topgrab)
# Convert traction times cell area to force per driven atom in eV/A.
variable        fxa equal v_taubar*lx*ly*6.241509e-7/v_ntop
fix             pull topgrab addforce v_fxa 0.0 0.0

# Fixed monitoring regions span the periodic y direction.
region          rLow  block ${XL0} ${XL1} INF INF ${ZL0} ${ZL1} units box
region          rUpp  block ${XU0} ${XU1} INF INF ${ZU0} ${ZU1} units box
compute         tl all reduce/region rLow sum c_st[5]
compute         tu all reduce/region rUpp sum c_st[5]
# Virial monitor convention: -sum(c_st[5]) / region volume / 10, in MPa.
variable        VL equal (v_XL1-v_XL0)*ly*(v_ZL1-v_ZL0)*10.0
variable        VU equal (v_XU1-v_XU0)*ly*(v_ZU1-v_ZU0)*10.0
variable        tauLowMPa equal -c_tl/v_VL
variable        tauUppMPa equal -c_tu/v_VU

thermo          200
thermo_style    custom step atoms temp pe ke etotal press pxz v_taubar v_tauLowMPa v_tauUppMPa

dump            d1 all custom 2000 ${OUT_PREFIX}.production.lammpstrj id type x y z c_pe_atom c_st[1] c_st[2] c_st[3] c_st[4] c_st[5] c_st[6]
dump_modify     d1 sort id
restart         10000 ${OUT_PREFIX}.restart.a ${OUT_PREFIX}.restart.b

run             ${NSTEPS} upto

write_data      ${OUT_PREFIX}.production.final.data
write_dump      all custom ${OUT_PREFIX}.production.final.lammpstrj id type x y z c_pe_atom c_st[1] c_st[2] c_st[3] c_st[4] c_st[5] c_st[6] modify sort id
